*HEADING
SO-101 upper_arm_link CalculiX smoke test: official
*NODE
1, 38.5839007, 14.4830799, -34.8
2, 38.7364938, 13.2306251, -35.2624926
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*ELEMENT, TYPE=C3D4, ELSET=EALL
1, 1690, 3370, 1684, 3446
2, 2942, 668, 2922, 3612
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*NSET, NSET=FIXED
49, 50, 51, 52, 53, 54
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*NSET, NSET=LOADED
107, 108, 109, 110, 111, 112
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*ELSET, ELSET=EALL
1, 2, 3, 4, 5, 6
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*MATERIAL, NAME=PLA_screening
*ELASTIC
2500, 0.35
*SOLID SECTION, ELSET=EALL, MATERIAL=PLA_screening
*BOUNDARY
FIXED, 1, 3, 0.0
*STEP
*STATIC
*CLOAD
107, 3, -0.0175746924429
108, 3, -0.0175746924429
109, 3, -0.0175746924429
110, 3, -0.0175746924429
111, 3, -0.0175746924429
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3745, 3, -0.0175746924429
*NODE PRINT, NSET=LOADED
U
*EL PRINT, ELSET=EALL
S
*NODE FILE
U
*EL FILE
S
*END STEP
